<?xml version="1.0"?>
<?xml-stylesheet type="text/xsl" href="http://jsbsim.sourceforge.net/JSBSim.xsl"?>

<!--
##############################################
# Copyright (c) Joshua Davidson (it0uchpods) #
##############################################
-->

<fdm_config name="IDG-MD-10X" version="2.0" release="BETA"
xmlns:xsi="http://www.w3.org/2001/XMLSchema-instance"
xsi:noNamespaceSchemaLocation="http://jsbsim.sourceforge.net/JSBSim.xsd">

	<fileheader>
		<author>Joshua Davidson (it0uchpods)</author>
		<version>Pre V1.0</version>
		<description>MD-10 FDE</description>
	</fileheader>

	<metrics file="Systems/md-10-metrics"/>
	<mass_balance file="Systems/md-10-mass-balance"/>
	<ground_reactions file="Systems/md-10-ground-reactions"/>

	<propulsion>
		<engine file="cf6-50c_1">
			<location unit="M">
				<x> -5.29297 </x>
				<y> -8.24094 </y>
				<z> 3.47943 </z>
			</location>
			<orient unit="DEG">
				<roll> 0.0 </roll>
				<pitch> 2.2 </pitch>
				<yaw> 1 </yaw>
			</orient>
			<feed>5</feed>
			<thruster file="direct">
				<location unit="M">
					<x> -5.29297 </x>
					<y> -8.24094 </y>
					<z> 3.47943 </z>
				</location>
				<orient unit="DEG">
					<roll> 0.0 </roll>
					<pitch> 2.2 </pitch>
					<yaw> 1 </yaw>
				</orient>
			</thruster>
		</engine>

		<engine file="cf6-50c_2">
			<location unit="M">
				<x> 20.764 </x>
				<y> 0 </y>
				<z> 10.6498 </z>
			</location>
			<orient unit="DEG">
				<roll> 0.0 </roll>
				<pitch> 0.0 </pitch>
				<yaw> 0 </yaw>
			</orient>
			<feed>6</feed>
			<thruster file="direct">
				<location unit="M">
					<x> 25.2146 </x>
					<y> 0 </y>
					<z> 10.698 </z>
				</location>
				<orient unit="DEG">
					<roll> 0.0 </roll>
					<pitch> 0.0 </pitch>
					<yaw> 0 </yaw>
				</orient>
			</thruster>
		</engine>

		<engine file="cf6-50c_3">
			<location unit="M">
				<x> -5.29297 </x>
				<y> 8.24094 </y>
				<z> 3.47943 </z>
			</location>
			<orient unit="DEG">
				<roll> 0.0 </roll>
				<pitch> 2.2 </pitch>
				<yaw> -1 </yaw>
			</orient>
			<feed>7</feed>
			<thruster file="direct">
				<location unit="M">
					<x> -5.29297 </x>
					<y> 8.24094 </y>
					<z> 3.47943 </z>
				</location>
				<orient unit="DEG">
					<roll> 0.0 </roll>
					<pitch> 2.2 </pitch>
					<yaw> -1 </yaw>
				</orient>
			</thruster>
		</engine>

		<tank type="FUEL">    <!-- Left Tank -->
			<location unit="M">
				<x> 2.5152 </x>
				<y> -11.3314 </y>
				<z> 5.69282 </z>
			</location>
			<capacity unit="LBS"> 40500 </capacity>
			<contents unit="LBS"> 20000 </contents>
			<standpipe unit="LBS">31</standpipe>
			<priority>2</priority>
			<type>JET-A1</type>
			<temperature>50</temperature>
		</tank>
		<tank type="FUEL">    <!-- Center Tank -->
			<location unit="M">
				<x> 2.5152 </x>
				<y> 0 </y>
				<z> 5.69282 </z>
			</location>
			<capacity unit="LBS"> 64050 </capacity>
			<contents unit="LBS"> 20000 </contents>
			<standpipe unit="LBS">43</standpipe>
			<priority>1</priority>
			<type>JET-A1</type>
			<temperature>50</temperature>
		</tank>
		<tank type="FUEL">    <!-- Right Tank -->
			<location unit="M">
				<x> 2.5152 </x>
				<y> 11.3314 </y>
				<z> 5.69282 </z>
			</location>
			<capacity unit="LBS"> 40500 </capacity>
			<contents unit="LBS"> 20000 </contents>
			<standpipe unit="LBS">31</standpipe>
			<priority>2</priority>
			<type>JET-A1</type>
			<temperature>50</temperature>
		</tank>
		<tank type="FUEL">    <!-- Aux Tank -->
			<location unit="M">
				<x> 2.5152 </x>
				<y> 0 </y>
				<z> 5.69282 </z>
			</location>
			<capacity unit="LBS"> 98100 </capacity>
			<contents unit="LBS">     0 </contents>
			<standpipe unit="LBS">43</standpipe>
			<priority>1</priority>
			<type>JET-A1</type>
			<temperature>50</temperature>
		</tank>
		<tank type="FUEL">    <!-- Tail Tank -->
			<location unit="M">
				<x> 15.0705 </x>
				<y> 0 </y>
				<z> 5.69282 </z>
			</location>
			<capacity unit="LBS"> 0.00001 </capacity> <!-- MD-10 has no tail tank, this prevents the code from breaking -->
			<contents unit="LBS">       0 </contents>
			<standpipe unit="LBS">31</standpipe>
			<priority>1</priority>
			<type>JET-A1</type>
			<temperature>50</temperature>
		</tank>
		<tank type="FUEL">    <!-- Engine 1 Pipe -->
			<location unit="M">
				<x> 2.5152 </x>
				<y> 0 </y>
				<z> 5.69282 </z>
			</location>
			<capacity unit="LBS"> 10 </capacity>
			<contents unit="LBS"> 0 </contents>
			<priority>1</priority>
			<type>JET-A1</type>
		</tank>
		<tank type="FUEL">    <!-- Engine 2 Pipe -->
			<location unit="M">
				<x> 2.5152 </x>
				<y> 0 </y>
				<z> 5.69282 </z>
			</location>
			<capacity unit="LBS"> 10 </capacity>
			<contents unit="LBS"> 0 </contents>
			<priority>1</priority>
			<type>JET-A1</type>
		</tank>
		<tank type="FUEL">    <!-- Engine 3 Pipe -->
			<location unit="M">
				<x> 2.5152 </x>
				<y> 0 </y>
				<z> 5.69282 </z>
			</location>
			<capacity unit="LBS"> 10 </capacity>
			<contents unit="LBS"> 0 </contents>
			<priority>1</priority>
			<type>JET-A1</type>
		</tank>
	</propulsion>

	<system file="pushback"/>
	<system file="../IDG-MD-11X/Systems/fuel"/>
	<system file="glass-effect1"/>
	<system file="md-10-fcs"/>
	<system file="md-10-spoiler"/>

	<flight_control name="none"/>

	<aerodynamics file="Systems/md-10-aerodynamics.xml"/>
	<external_reactions file="Systems/md-10-external-reactions"/>

</fdm_config>
